<?xml version="1.0"?>
<!-- Generated by Aero-Matic v 1

     Inputs:
                horsepower: 3250.0
                     pitch: variable
            max engine rpm: 2850
        prop diameter (ft): 15.1666666667

     Outputs:
              max prop rpm: 1237.12
                gear ratio:    2.30
                       Cp0: 0.095349
                       Ct0: 0.222163
       static thrust (lbs): 11884.08

YAKKO EDIT: Changed first positive entry in each table from 15 to 12 in order
            to alleviate this problem:  Reducing throttle to the point where
            the prop goes to minimum pitch caused a sudden negative thrust
            condition which got worse as power was applied until the prop
            came up past the minumum pitch, at which time it instantly went
            to a strong positive thrust.

-->

<propeller name="prop">
  <ixx>54.1740 </ixx>
  <diameter unit="IN">182.0 </diameter>
  <numblades> 3 </numblades>
  <gearratio>2.30 </gearratio>
  <minpitch> 12 </minpitch>
  <maxpitch> 45 </maxpitch>
  <featherpitch> 81.5 </featherpitch>
  <reversepitch> -21.5 </reversepitch> <!-- must match the table -->
  <minrpm> 590 </minrpm>
  <maxrpm> 1270 </maxrpm>
  <ct_factor>1.21</ct_factor>
 <table name="C_THRUST" type="internal">
      <tableData>
               -10         0       12       25       35       45       55       65       90
      -0.2     -0.1084   0.0611   0.2222   0.2721   0.2999   0.3166   0.2917   0.2499   0.0000
       0.0     -0.1611   0.0000   0.2222   0.2721   0.2999   0.3195   0.2986   0.2499   0.0000
       0.2     -0.1806  -0.0555   0.1917   0.2666   0.2957   0.3195   0.2986   0.2499   0.0000
       0.4     -0.1806  -0.1291   0.1444   0.2639   0.2901   0.3166   0.2986   0.2499   0.0000
       0.6     -0.1806  -0.1806   0.0764   0.2375   0.2777   0.3084   0.2944   0.2499   0.0000
       0.8     -0.1806  -0.1806   0.0042   0.1777   0.2695   0.2973   0.2944   0.2499   0.0000
       1.0     -0.1806  -0.1806  -0.0722   0.1084   0.2584   0.2819   0.2917   0.2499   0.0000
       1.2     -0.1806  -0.1806  -0.1486   0.0333   0.2124   0.2721   0.2917   0.2499   0.0000
       1.4     -0.1806  -0.1806  -0.1806  -0.0487   0.1528   0.2679   0.2861   0.2499   0.0000
       1.6     -0.1806  -0.1806  -0.1806  -0.1235   0.0833   0.2584   0.2806   0.2499   0.0000
       1.8     -0.1806  -0.1806  -0.1806  -0.1806   0.0140   0.2222   0.2721   0.2499   0.0000
       2.0     -0.1806  -0.1806  -0.1806  -0.1806  -0.0555   0.1735   0.2710   0.2499   0.0000
       2.2     -0.1806  -0.1806  -0.1806  -0.1806  -0.1251   0.1251   0.2666   0.2499   0.0000
       2.4     -0.1806  -0.1806  -0.1806  -0.1806  -0.1806   0.0666   0.2177   0.2499   0.0000
       2.6     -0.1806  -0.1806  -0.1806  -0.1806  -0.1806   0.0084   0.1377   0.2222   0.0000
       2.8     -0.1806  -0.1806  -0.1806  -0.1806  -0.1806  -0.0500   0.0902   0.1806   0.0000
       3.0     -0.1806  -0.1806  -0.1806  -0.1806  -0.1806  -0.1084   0.0473   0.1389   0.0000
       3.2     -0.1806  -0.1806  -0.1806  -0.1806  -0.1806  -0.1666   0.0042   0.0973   0.0000
       3.4     -0.1806  -0.1806  -0.1806  -0.1806  -0.1806  -0.1806  -0.0389   0.0555   0.0000
       3.6     -0.1806  -0.1806  -0.1806  -0.1806  -0.1806  -0.1806  -0.0820   0.0140   0.0000
       3.8     -0.1806  -0.1806  -0.1806  -0.1806  -0.1806  -0.1806  -0.1251  -0.0278   0.0000
       4.0     -0.1806  -0.1806  -0.1806  -0.1806  -0.1806  -0.1806  -0.1680  -0.0695   0.0000
       6.0     -0.1806  -0.1806  -0.1806  -0.1806  -0.1806  -0.1806  -0.1806  -0.1806   0.0000
      </tableData>
  </table>

  <table name="C_POWER" type="internal">
     <tableData>
              -10        0       12       25       35       45       55        65        90
      -0.2      0.0159   0.0318   0.1113   0.2527   0.4357   0.6198   0.7151   0.7914   0.7914
       0.0      0.0636   0.0159   0.0953   0.2355   0.4167   0.6198   0.7180   0.7914   0.7914
       0.2      0.0906   0.0255   0.0922   0.2193   0.3986   0.6198   0.7180   0.7914   0.7914
       0.4      0.1220   0.0556   0.0794   0.2021   0.3785   0.6198   0.7180   0.7914   0.7914
       0.6      0.1497   0.0842   0.0524   0.1878   0.3547   0.6074   0.7151   0.7914   0.7914
       0.8      0.1764   0.1128   0.0159   0.1592   0.3337   0.5797   0.7151   0.7914   0.7914
       1.0      0.2031   0.1402   0.0159   0.1116   0.3147   0.5502   0.7123   0.7914   0.7914
       1.2      0.2307   0.1120  -0.0524   0.0429   0.2784   0.5273   0.7075   0.7914   0.7914
       1.4      0.2574   0.1936  -0.0791  -0.0318   0.2145   0.5197   0.6989   0.7914   0.7914
       1.6      0.2841   0.2212  -0.0925  -0.0953   0.1354   0.5053   0.6837   0.7628   0.7914
       1.8      0.3118   0.2479  -0.0953  -0.1592   0.0398   0.4481   0.6627   0.7466   0.7914
       2.0      0.3385   0.2746  -0.1220  -0.2222  -0.0477   0.3814   0.6312   0.7313   0.7914
       2.2      0.3652   0.3023  -0.1497  -0.2860  -0.1430   0.3099   0.6121   0.6989   0.7914
       2.4      0.3928   0.3290  -0.1764  -0.3499  -0.2384   0.2212   0.5940   0.6837   0.7914
       2.6      0.4195   0.3557  -0.2031  -0.4129  -0.3023   0.0925   0.5797   0.6598   0.7914
       2.8      0.4462   0.3833  -0.2307  -0.4767  -0.3623  -0.0315   0.5673   0.6512   0.7914
       3.0      0.4739   0.4100  -0.2574  -0.5406  -0.4291  -0.1430   0.5483   0.6512   0.7914
       3.2      0.5006   0.4367  -0.2841  -0.6036  -0.4930  -0.2546   0.5130   0.6360   0.7914
       3.4      0.5273   0.4643  -0.3118  -0.6674  -0.5559  -0.3652   0.3976   0.6198   0.7914
       3.6      0.5549   0.4910  -0.3385  -0.7313  -0.6198  -0.4767   0.2794   0.6036   0.7914
       3.8      0.5816   0.5177  -0.3652  -0.7914  -0.6837  -0.5883   0.1554   0.5845   0.7914
       4.0      0.6083   0.5454  -0.3928  -0.7914  -0.7914  -0.6989   0.0315   0.5406   0.7914
       6.0      0.7914   0.7914  -0.7914  -0.7914  -0.7914  -0.7914  -0.7914  -0.4767   0.7914
     </tableData>
  </table>


</propeller>
