<?xml version="1.0"?>
<?xml-stylesheet href="http://jsbsim.sourceforge.net/JSBSim.xsl" type="text/xsl"?>
<fdm_config name="Lockheed1049h" version="2.0" release="1.1.5"
 xmlns:xsi="http://www.w3.org/2001/XMLSchema-instance"
 xsi:noNamespaceSchemaLocation="http://jsbsim.sourceforge.net/JSBSim.xsd">

    <fileheader>
        <author>Lake of Constance Hangar :: Marc Kraus</author>
        <filecreationdate>24 Feb 2014</filecreationdate>
        <version> 1.3.0 </version>
        <description> Lockheed1049h </description>
				<!--
				Lockheed L1049G Super Constellation
				[ I did not found the data for the L1049H ]
				Kenngroeße							Daten
				Laenge									34,60 m
				Fluegelspannweite				37,50 m
				Hoehe										7,55 m
				Leergewicht							31.298 kg
				max. Startgewicht				62.370 kg

				Reisegeschwindigkeit		482 km/h
				Reichweite							6.486 km
				Dienstgipfelhöhe				7.050 m

				Kapazitaet	5–10 Personen Besatzung, 47–99 Passagiere
				-->
    </fileheader>

		 <metrics>
			 <wingarea  unit="M2"> 			154.200 </wingarea>
			 <wingspan  unit="M"> 			 37.500 </wingspan>
			 <wing_incidence unit="DEG">  3.900 </wing_incidence>
			 <chord     unit="M"> 				4.100 </chord>
			 <htailarea unit="M2"> 			 71.344 </htailarea>
			 <htailarm  unit="M"> 			 16.090 </htailarm>
			 <vtailarea unit="M2"> 			 80.262 </vtailarea>
			 <vtailarm  unit="M"> 			 16.090 </vtailarm>
			 <location name="AERORP" unit="M">
				 <x> -0.396</x>
				 <y>  0.00</y>
				 <z>  0.00</z>
			 </location>
			 <location name="EYEPOINT" unit="M">
				 <x>-14.85</x>
				 <y>-0.45</y>
				 <z>  1.26</z>
			 </location>
			 <location name="VRP" unit="M">
				 <x>-11.12</x>
				 <y>   0  </y>
				 <z>   0  </z>
			 </location>
		 </metrics>

		 <mass_balance>
			 <ixx unit="SLUG*FT2">    830585 </ixx>
			 <iyy unit="SLUG*FT2">    798237 </iyy>
			 <izz unit="SLUG*FT2">   1655877 </izz>
			 <emptywt unit="LBS" >     69012 </emptywt>
			 <location name="CG" unit="M">
				 <x> -0.396</x>
				 <y>  0.00</y>
				 <z> -0.865</z>
			 </location>
				<pointmass name="CREW">
				    <weight unit="LBS">300</weight>
				    <location name="POINTMASS" unit="M">
				    <x>-9.143</x>
				    <y>0</y>
				    <z>0</z>
				    </location>
				</pointmass>
				<pointmass name="PASSENGER">
				    <weight unit="LBS">6600</weight><!-- 47 passengers-->
				    <location name="POINTMASS" unit="M">
				    <x>-5.396</x>
				    <y>0</y>
				    <z>0</z>
				    </location>
				</pointmass>
				<pointmass name="LUGGAGE">
				    <weight unit="LBS">7500</weight><!-- cargo or more passengers -->
				    <location name="POINTMASS" unit="M">
				    <x>2.396</x>
				    <y>0</y>
				    <z>0</z>
				    </location>
				</pointmass>
		 </mass_balance>

		 <ground_reactions>

			<contact type="BOGEY" name="NOSE">
			 <location unit="M">
				 <x>-15.425</x>
				 <y>0.00</y>
				 <z> -3.9</z>
			 </location>
			 <static_friction>  0.80 </static_friction>
			 <dynamic_friction> 0.50 </dynamic_friction>
			 <rolling_friction> 0.02 </rolling_friction>
			 <spring_coeff unit="LBS/FT">      29191.33 </spring_coeff>
			 <damping_coeff unit="LBS/FT/SEC">  9730.44 </damping_coeff>
			 <max_steer unit="DEG">30.00 </max_steer>
			 <brake_group>NONE</brake_group>
			 <retractable>1</retractable>
		 </contact>

			<contact type="BOGEY" name="LEFT_MAIN">
			 <location unit="M">
				 <x> 0.34</x>
				 <y>-4.634</y>
				 <z> -3.42</z>
			 </location>
			 <static_friction>  0.80 </static_friction>
			 <dynamic_friction> 0.50 </dynamic_friction>
			 <rolling_friction> 0.02 </rolling_friction>
			 <spring_coeff unit="LBS/FT">      97304.45 </spring_coeff>
			 <damping_coeff unit="LBS/FT/SEC"> 19460.89 </damping_coeff>
			 <max_steer unit="DEG">0</max_steer>
			 <brake_group>LEFT</brake_group>
			 <retractable>1</retractable>
		 </contact>

			<contact type="BOGEY" name="RIGHT_MAIN">
			 <location unit="M">
				 <x>0.34</x>
				 <y>4.634</y>
				 <z>-3.42</z>
			 </location>
			 <static_friction>  0.80 </static_friction>
			 <dynamic_friction> 0.50 </dynamic_friction>
			 <rolling_friction> 0.02 </rolling_friction>
			 <spring_coeff unit="LBS/FT">      97304.45 </spring_coeff>
			 <damping_coeff unit="LBS/FT/SEC"> 19460.89 </damping_coeff>
			 <max_steer unit="DEG">0</max_steer>
			 <brake_group>RIGHT</brake_group>
			 <retractable>1</retractable>
		 </contact>

			<contact type="STRUCTURE" name="LEFT_WING">
				<location unit="M">
				 <x>  0    </x>
				 <y> 17.85 </y>
				 <z> 1.865 </z>
				</location>
				<static_friction>  0.80 </static_friction>
				<dynamic_friction> 0.50 </dynamic_friction>
				<spring_coeff unit="LBS/FT">97304.45 </spring_coeff>
				<damping_coeff unit="LBS/FT/SEC">19460.89 </damping_coeff>
		 </contact>

			<contact type="STRUCTURE" name="RIGHT_WING">
				<location unit="M">
				 <x>  0    </x>
				 <y>-17.85 </y>
				 <z> 1.865 </z>
				</location>
				<static_friction>  0.80 </static_friction>
				<dynamic_friction> 0.50 </dynamic_friction>
				<spring_coeff unit="LBS/FT">97304.45 </spring_coeff>
				<damping_coeff unit="LBS/FT/SEC">19460.89 </damping_coeff>
		 </contact>

		 </ground_reactions>

 		<propulsion>
		  <engine file="WrightCyclone-972TC18DA3">
		      <location unit="M">
		          <x> -0.396</x>
				  <!--
		          <y> -9.10 </y>
				  -->
		          <y> -3.10 </y>
		          <z>  0.18 </z>
		      </location>
		      <orient unit="DEG">
		          <roll> 0.0 </roll>
		          <pitch> 0 </pitch>
		          <yaw> 0 </yaw>
		      </orient>
		      <feed>0</feed> <!-- Eng 1 fuel line buffer -->
		      <thruster file="HamiltonStd43E60-6901A">
						  <location unit="M">
						      <x> -0.396</x>
							  <!--
					          <y> -9.10 </y>
							  -->
					          <y> -3.10 </y>
						      <z>  0.18 </z>
						  </location>
		          <orient unit="DEG">
		              <roll> 0.0 </roll>
		              <pitch> 0.0 </pitch>
		              <yaw> 0.0 </yaw>
		          </orient>
		      </thruster>
		  </engine>
		  <engine file="WrightCyclone-972TC18DA3">
		      <location unit="M">
		          <x> -0.396</x>
				  <!--
		          <y> -4.23 </y>
				  -->
		          <y> -1.10 </y>
		          <z> -0.51 </z>
		      </location>
		      <orient unit="DEG">
		          <roll> 0.0 </roll>
		          <pitch> 0 </pitch>
		          <yaw> 0 </yaw>
		      </orient>
		      <feed>1</feed> <!-- Eng 2 fuel line buffer -->
		      <thruster file="HamiltonStd43E60-6901A">
						  <location unit="M">
						      <x> -0.396</x>
							  <!--
					          <y> -4.23 </y>
							  -->
					          <y> -1.10 </y>
						      <z> -0.51 </z>
						  </location>
		          <orient unit="DEG">
		              <roll> 0.0 </roll>
		              <pitch> 0.0 </pitch>
		              <yaw> 0.0 </yaw>
		          </orient>
		      </thruster>
		  </engine>
		  <engine file="WrightCyclone-972TC18DA3">
		      <location unit="M">
		          <x> -0.396</x>
				  <!--
		          <y> 4.23 </y>
				  -->
		          <y> 1.10 </y>
		          <z> -0.51 </z>
		      </location>
		      <orient unit="DEG">
		          <roll> 0.0 </roll>
		          <pitch> 0 </pitch>
		          <yaw> 0 </yaw>
		      </orient>
		      <feed>2</feed> <!-- Eng 3 fuel line buffer -->
		      <thruster file="HamiltonStd43E60-6901A">
						  <location unit="M">
						      <x> -0.396</x>
							  <!--
					          <y> 4.23 </y>
							  -->
					          <y> 1.10 </y>
						      <z> -0.51 </z>
						  </location>
		          <orient unit="DEG">
		              <roll> 0.0 </roll>
		              <pitch> 0.0 </pitch>
		              <yaw> 0.0 </yaw>
		          </orient>
		      </thruster>
		  </engine>
		  <engine file="WrightCyclone-972TC18DA3">
				  <location unit="M">
				      <x> -0.396</x>
					  <!--
			          <y> 9.10 </y>
					  -->
			          <y> 3.10 </y>
				      <z>  0.18 </z>
				  </location>
		      <orient unit="DEG">
		          <roll> 0.0 </roll>
		          <pitch> 0 </pitch>
		          <yaw> 0 </yaw>
		      </orient>
		      <feed>3</feed> <!-- Eng 4 fuel line buffer -->
		      <thruster file="HamiltonStd43E60-6901A">
						  <location unit="M">
						      <x> -0.396</x>
							  <!--
					          <y> 9.10 </y>
							  -->
					          <y> 3.10 </y>
						      <z>  0.18 </z>
						  </location>
		          <orient unit="DEG">
		              <roll> 0.0 </roll>
		              <pitch> 0.0 </pitch>
		              <yaw> 0.0 </yaw>
		          </orient>
		      </thruster>
		  </engine>


			<!-- ############################################
			Tank Indexes and corresponding tanks:
			[ 0,  1,  2,  3, 4, 5, 6, 7, 8,  9, 10, 11, 12]
		   B1, B2, B3, B4, 1, 2, 3, 4, 5, 1A, 2A, 3A, 4A
			###############################################
			Line Buffers             True Tanks

			See Nasal/Lockheed1049h-fuel.nas for more information about the tank/fuel system.
			Do not set tank capacity/contents to 0
			############################################### -->

			<tank type="FUEL" number="0"><!-- #B1 first in the bottom of fuselage (buffer) -->
				<location unit="M">
				 <x> 0.0</x>
				 <y> 0.0</y>
				 <z>-0.8</z>
				</location>
				<capacity unit="LBS"> 10</capacity>
				<contents unit="LBS"> 10</contents>
			</tank>

			<tank type="FUEL" number="1"><!-- #B2 second in the bottom of fuselage (buffer)-->
				<location unit="M">
				 <x> 0.0</x>
				 <y> 0.0</y>
				 <z>-0.8</z>
				</location>
				<capacity unit="LBS"> 10</capacity>
				<contents unit="LBS"> 10</contents>
			</tank>

			<tank type="FUEL" number="2"><!-- #B3 third in the bottom of fuselage (buffer)-->
				<location unit="M">
				 <x> 0.0</x>
				 <y> 0.0</y>
				 <z>-0.8</z>
				</location>
				<capacity unit="LBS"> 10</capacity>
				<contents unit="LBS"> 10</contents>
			</tank>

			<tank type="FUEL" number="3"><!-- #B4 forth in the bottom of fuselage (buffer)-->
				<location unit="M">
				 <x> 0.0</x>
				 <y> 0.0</y>
				 <z>-0.8</z>
				</location>
				<capacity unit="LBS"> 10</capacity>
				<contents unit="LBS"> 10</contents>
			</tank>

			<tank type="FUEL" number="4"><!-- # Tank 1 behind the outer left engine -->
				<location unit="M">
				 <x> 0.0</x>
				 <y>-9.12</y>
				 <z> 0.48</z>
				</location>
				<capacity unit="LBS"> 9330 </capacity>
				<contents unit="LBS"> 9330 </contents>
			</tank>

			<tank type="FUEL" number="5"><!-- # Tank 2 behind the inner left engine-->
				<location unit="M">
				 <x> 0.0</x>
				 <y>-4.28</y>
				 <z>-0.32</z>
				</location>
				<capacity unit="LBS"> 4740 </capacity>
				<contents unit="LBS"> 4740 </contents>
			</tank>

			<tank type="FUEL" number="6"><!-- # Tank 3 behind the inner right engine-->
				<location unit="M">
				 <x> 0.0</x>
				 <y> 4.28</y>
				 <z>-0.32</z>
				</location>
				<capacity unit="LBS"> 4740 </capacity>
				<contents unit="LBS"> 4740 </contents>
			</tank>

			<tank type="FUEL" number="7"><!-- # Tank 4 behind the outer right engine -->
				<location unit="M">
				 <x> 0.0</x>
				 <y> 9.12</y>
				 <z> 0.48</z>
				</location>
				<capacity unit="LBS"> 9330 </capacity>
				<contents unit="LBS"> 9330 </contents>
			</tank>

			<tank type="FUEL" number="8"><!-- # Tank 5 center bottom of fuselage -->
				<location unit="M">
				 <x> 0.0</x>
				 <y> 0.0 </y>
				 <z>-0.32</z>
				</location>
				<capacity unit="LBS"> 4380 </capacity>
				<contents unit="LBS"> 4380 </contents>
			</tank>

			<tank type="FUEL" number="9"><!-- # Tank 1A outer left -->
				<location unit="M">
				 <x> 0.0</x>
				 <y>-16.43</y>
				 <z>  1.37</z>
				</location>
				<capacity unit="LBS">6</capacity>
				<contents unit="LBS">6</contents>
			</tank>

			<tank type="FUEL" number="10"><!-- # Tank 2A left -->
				<location unit="M">
				 <x> 0.0</x>
				 <y>-12.76</y>
				 <z>  1.0</z>
				</location>
				<capacity unit="LBS"> 3390 </capacity>
				<contents unit="LBS"> 3390 </contents>
			</tank>

			<tank type="FUEL" number="11"><!-- # Tank 3A right -->
				<location unit="M">
				 <x> 0.0</x>
				 <y> 12.76</y>
				 <z>  1.0</z>
				</location>
				<capacity unit="LBS"> 3390 </capacity>
				<contents unit="LBS"> 3390 </contents>
			</tank>

			<tank type="FUEL" number="12"><!-- # Tank 4A outer right -->
				<location unit="M">
				 <x> 0.0</x>
				 <y> 16.43</y>
				 <z>  1.37</z>
				</location>
				<capacity unit="LBS">6</capacity>
				<contents unit="LBS">6</contents>
			</tank>

		</propulsion>

    <flight_control name="Lockheed1049-H">

        <channel name="Pitch">

           <summer name="Pitch Trim Sum">
               <input>fcs/elevator-cmd-norm</input>
               <input>fcs/pitch-trim-cmd-norm</input>
               <clipto>
                   <min>-1</min>
                   <max>1</max>
               </clipto>
           </summer>

           <aerosurface_scale name="Elevator Control">
               <input>fcs/pitch-trim-sum</input>
               <gain>0.007</gain>
               <range>
                   <min>-15</min>
                   <max>15</max>
               </range>
               <output>fcs/elevator-pos-rad</output>
           </aerosurface_scale>
           <aerosurface_scale name="Elevator Position Normalizer">
               <input>fcs/pitch-trim-sum</input>
               <range>
                   <min>-1</min>
                   <max>1</max>
               </range>
               <output>fcs/elevator-pos-norm</output>
           </aerosurface_scale>

        </channel>
        <channel name="Roll">

           <summer name="Roll Trim Sum">
               <input>fcs/aileron-cmd-norm</input>
               <input>fcs/roll-trim-cmd-norm</input>
               <clipto>
                   <min>-1</min>
                   <max>1</max>
               </clipto>
           </summer>

           <aerosurface_scale name="Left Aileron Control">
               <input>fcs/roll-trim-sum</input>
               <gain>0.006</gain>
               <range>
                   <min>-20</min>
                   <max>20</max>
               </range>
               <output>fcs/left-aileron-pos-rad</output>
           </aerosurface_scale>
           <aerosurface_scale name="Left Aileron Position Normalizer">
               <input>fcs/roll-trim-sum</input>
               <range>
                   <min>-1</min>
                   <max>1</max>
               </range>
               <output>fcs/left-aileron-pos-norm</output>
           </aerosurface_scale>

           <aerosurface_scale name="Right Aileron Control">
               <input>fcs/roll-trim-sum</input>
               <gain>0.006</gain>
               <range>
                   <min>-20</min>
                   <max>20</max>
               </range>
               <output>fcs/right-aileron-pos-rad</output>
           </aerosurface_scale>
           <aerosurface_scale name="Right Aileron Position Normalizer">
               <input>fcs/roll-trim-sum</input>
               <range>
                   <min>-1</min>
                   <max>1</max>
               </range>
               <output>fcs/right-aileron-pos-norm</output>
           </aerosurface_scale>

        </channel>

        <channel name="Yaw">
           <summer name="Rudder Command Sum">
               <input>fcs/rudder-cmd-norm</input>
               <input>fcs/yaw-trim-cmd-norm</input>
               <clipto>
                   <min>-1</min>
                   <max>1</max>
               </clipto>
           </summer>

           <aerosurface_scale name="Rudder Control">
               <input>fcs/rudder-command-sum</input>
               <gain>0.007</gain>
               <range>
                   <min>-30</min>
                   <max>30</max>
               </range>
               <output>fcs/rudder-pos-rad</output>
           </aerosurface_scale>
           <aerosurface_scale name="Rudder Position Normalizer">
               <input>fcs/rudder-command-sum</input>
               <range>
                   <min>-1</min>
                   <max>1</max>
               </range>
               <output>fcs/rudder-pos-norm</output>
           </aerosurface_scale>
        </channel>

     <channel name="Aeromechanical">

        <kinematic name="Flaps Control">
            <input>fcs/flap-cmd-norm</input>
            <traverse>
                <documentation>
                  - replaced 30 deg by 41 deg real.
                  - add the 10 deg detent, because of the initial translation (Fowler flap).
                  - add the 35 deg detent, because 60 %, 66 %, 80 % and 100 %.
                </documentation>
                <setting>
                    <position>0</position>
                    <time>0</time>
                </setting>
                <setting>
                    <position>10</position>
                    <time>5</time>
                </setting>
                <setting>
                    <position>27</position>
                    <time>4</time>
                </setting>
                <setting>
                    <position>35</position>
                    <time>4</time>
                </setting>
                <setting>
                    <position>41</position>
                    <time>3</time>
                </setting>
            </traverse>
            <output>fcs/flap-pos-deg</output>
        </kinematic>

        <aerosurface_scale name="Flap Position Normalizer">
          <input>fcs/flap-pos-deg</input>
          <domain>
            <min>0</min>
            <max>41</max>
          </domain>
          <range>
            <min>0</min>
            <max>1</max>
          </range>
          <output>fcs/flap-pos-norm</output>
        </aerosurface_scale>

        <kinematic name="Gear Control">
            <input>gear/gear-cmd-norm</input>
            <traverse>
                <setting>
                    <position>0</position>
                    <time>0</time>
                </setting>
                <setting>
                    <position>1</position>
                    <time>5</time>
                </setting>
            </traverse>
            <output>gear/gear-pos-norm</output>
        </kinematic>

        <kinematic name="Speedbrake Control">
            <input>fcs/speedbrake-cmd-norm</input>
            <traverse>
                <setting>
                    <position>0</position>
                    <time>0</time>
                </setting>
                <setting>
                    <position>1</position>
                    <time>1</time>
                </setting>
            </traverse>
            <output>fcs/speedbrake-pos-norm</output>
        </kinematic>
     </channel>
    </flight_control>
    <aerodynamics>
        <documentation>
            created to smooth takeoff roll.
        </documentation>
        <function name="aero/function/kCLge">
            <description>Change_in_lift_due_to_ground_effect</description>
            <product>
                  <table>
                      <independentVar>aero/h_b-mac-ft</independentVar>
                      <tableData>
                          0.0000	1.1000
                          0.1000	1.0500
                          0.1500	0.9000
                          0.2000	0.8500
                          1.1000	0.7000
                      </tableData>
                  </table>
            </product>
        </function>

        <axis name="DRAG">
            <documentation>
               added.
            </documentation>
            <function name="aero/coefficient/CDo">
                <description>Drag_at_zero_lift</description>
                <product>
                    <property>aero/qbar-psf</property>
                    <property>metrics/Sw-sqft</property>
                    <value>0.0211</value>
                </product>
            </function>
            <documentation>
              - renamed from CDo.
              - substracted Cdo 0.0211.
            </documentation>
            <function name="aero/coefficient/CDalpha">
                <description>Drag_due_to_alpha</description>
                <product>
                    <property>aero/qbar-psf</property>
                    <property>metrics/Sw-sqft</property>
                      <table>
                          <independentVar>aero/alpha-rad</independentVar>
                          <tableData>
                              -1.5700	1.4789
                              -0.2600	0.0289
                              0.0000	0.0039
                              0.2600	0.0289
                              1.5700	1.4789
                          </tableData>
                      </table>
                </product>
            </function>
            <function name="aero/coefficient/CDi">
                <description>Induced_drag</description>
                <product>
                    <property>aero/qbar-psf</property>
                    <property>metrics/Sw-sqft</property>
                    <property>aero/cl-squared</property>
                    <value>0.0390</value>
                </product>
            </function>
            <function name="aero/coefficient/CDmach">
                <description>Drag_due_to_mach</description>
                <product>
                    <property>aero/qbar-psf</property>
                    <property>metrics/Sw-sqft</property>
                      <table>
                          <independentVar>velocities/mach</independentVar>
                          <tableData>
                              0.0000	0.0000
                              0.7000	0.0000
                              1.1000	0.0230
                              1.8000	0.0150
                          </tableData>
                      </table>
                </product>
            </function>
            <function name="aero/coefficient/CDflap">
                <description>Drag_due_to_flaps</description>
                <product>
                    <property>aero/qbar-psf</property>
                    <property>metrics/Sw-sqft</property>
                    <property>fcs/flap-cmd-norm</property>
                    <value>0.045</value>
                </product>
            </function>
            <function name="aero/coefficient/CDgear">
                <description>Drag_due_to_gear</description>
                <product>
                    <property>aero/qbar-psf</property>
                    <property>metrics/Sw-sqft</property>
                    <property>gear/gear-pos-norm</property>
                    <value>0.0230</value>
                </product>
            </function>
            <documentation>
              0.0250 becomes 0.0 : disable speedbrake.
            </documentation>
            <function name="aero/coefficient/CDsb">
                <description>Drag_due_to_speedbrakes</description>
                <product>
                    <property>aero/qbar-psf</property>
                    <property>metrics/Sw-sqft</property>
                    <property>fcs/speedbrake-pos-norm</property>
                    <value>0.0</value>
                </product>
            </function>
            <function name="aero/coefficient/CDbeta">
                <description>Drag_due_to_sideslip</description>
                <product>
                    <property>aero/qbar-psf</property>
                    <property>metrics/Sw-sqft</property>
                      <table>
                          <independentVar>aero/beta-rad</independentVar>
                          <tableData>
                              -1.5000	1.2300
                              -0.2600	0.0500
                              0.0000	0.0000
                              0.2600	0.0500
                              1.5700	1.2300
                          </tableData>
                      </table>
                </product>
            </function>
            <function name="aero/coefficient/CDde">
                <description>Drag_due_to_Elevator_Deflection</description>
                <product>
                    <property>aero/qbar-psf</property>
                    <property>metrics/Sw-sqft</property>
                    <abs><property>fcs/elevator-pos-norm</property></abs>
                    <value>0.0350</value>
                </product>
            </function>
        </axis>

        <axis name="SIDE">
            <function name="aero/coefficient/CYb">
                <description>Side_force_due_to_beta</description>
                <product>
                    <property>aero/qbar-psf</property>
                    <property>metrics/Sw-sqft</property>
                    <property>aero/beta-rad</property>
                    <value>-1.0000</value>
                </product>
            </function>
        </axis>

        <axis name="LIFT">
            <documentation>
               created.
            </documentation>
            <function name="aero/coefficient/CLo">
                <description>Lift_at_zero_alpha</description>
                <product>
                    <property>aero/qbar-psf</property>
                    <property>metrics/Sw-sqft</property>
                    <property>aero/function/kCLge</property>
                    <value>0.2400</value>
                </product>
            </function>
            <documentation>
               substracted CLo 0.240.
            </documentation>
            <function name="aero/coefficient/CLalpha">
                <description>Lift_due_to_alpha</description>
                <product>
                    <property>aero/qbar-psf</property>
                    <property>metrics/Sw-sqft</property>
                    <property>aero/function/kCLge</property>
                      <table>
                          <independentVar>aero/alpha-rad</independentVar>
                          <tableData>
                             -0.2000 -0.5000	                                     <!-- aeromatic -0.740 -->
                              0.0000	0.0000	                                     <!-- aeromatic  0.240 -->
                              0.2400	1.1600	                                     <!-- aeromatic  1.400 -->
                              0.6000	0.4640	                                     <!-- aeromatic  0.704 -->
                          </tableData>
                      </table>
                </product>
            </function>
            <documentation>
              to respect the speed limits of gear and flaps, controls by flap angle,
              to get more lift at takeoff setting.

              old : aero/qbar-psf|metrics/Sw-sqft|fcs/flap-pos-norm
            </documentation>
            <function name="aero/coefficient/dCLflap">
                <description>Delta_Lift_due_to_flaps</description>
                <product>
                    <property>aero/qbar-psf</property>
                    <property>metrics/Sw-sqft</property>
                    <property>aero/function/kCLge</property>
                      <table>
                          <independentVar>fcs/flap-pos-deg</independentVar>
                          <tableData>
                              0.0000	0.00
                              10.0000	0.28
                              27.0000	0.36
                              35.0000	0.41
                              41.0000	0.58
                          </tableData>
                      </table>
                </product>
            </function>
            <function name="aero/coefficient/dCLsb">
                <description>Delta_Lift_due_to_speedbrake</description>
                <product>
                    <property>aero/qbar-psf</property>
                    <property>metrics/Sw-sqft</property>
                    <property>fcs/speedbrake-pos-norm</property>
                    <value>0.0000</value>
                </product>
            </function>
            <function name="aero/coefficient/CLde">
                <description>Lift_due_to_Elevator_Deflection</description>
                <product>
                    <property>aero/qbar-psf</property>
                    <property>metrics/Sw-sqft</property>
                    <property>fcs/elevator-pos-rad</property>
                    <value>0.2000</value>
                </product>
            </function>
        </axis>

        <axis name="ROLL">
            <function name="aero/coefficient/Clb">
                <description>Roll_moment_due_to_beta</description>
                <product>
                    <property>aero/qbar-psf</property>
                    <property>metrics/Sw-sqft</property>
                    <property>metrics/bw-ft</property>
                    <property>aero/beta-rad</property>
                    <value>-0.1000</value>
                </product>
            </function>
            <function name="aero/coefficient/Clp">
                <description>Roll_moment_due_to_roll_rate</description>
                <product>
                    <property>aero/qbar-psf</property>
                    <property>metrics/Sw-sqft</property>
                    <property>metrics/bw-ft</property>
                    <property>aero/bi2vel</property>
                    <property>velocities/p-aero-rad_sec</property>
                    <value>-0.4000</value>
                </product>
            </function>
            <function name="aero/coefficient/Clr">
                <description>Roll_moment_due_to_yaw_rate</description>
                <product>
                    <property>aero/qbar-psf</property>
                    <property>metrics/Sw-sqft</property>
                    <property>metrics/bw-ft</property>
                    <property>aero/bi2vel</property>
                    <property>velocities/r-aero-rad_sec</property>
                    <value>0.1500</value>
                </product>
            </function>
            <function name="aero/coefficient/Clda">
                <description>Roll_moment_due_to_aileron</description>
                <product>
                    <property>aero/qbar-psf</property>
                    <property>metrics/Sw-sqft</property>
                    <property>metrics/bw-ft</property>
                    <property>fcs/left-aileron-pos-rad</property>
                      <table>
                          <independentVar>velocities/mach</independentVar>
                          <tableData>
                              0.0000	0.1500
                              2.0000	0.0500
                          </tableData>
                      </table>
                </product>
            </function>
            <function name="aero/coefficient/Cldr">
                <description>Roll_moment_due_to_rudder</description>
                <product>
                    <property>aero/qbar-psf</property>
                    <property>metrics/Sw-sqft</property>
                    <property>metrics/bw-ft</property>
                    <property>fcs/rudder-pos-rad</property>
                    <value>0.0100</value>
                </product>
            </function>
        </axis>

        <axis name="PITCH">
            <function name="aero/coefficient/Cmalpha">
                <description>Pitch_moment_due_to_alpha</description>
                <product>
                    <property>aero/qbar-psf</property>
                    <property>metrics/Sw-sqft</property>
                    <property>metrics/cbarw-ft</property>
                    <property>aero/alpha-rad</property>
                    <value>-0.2000</value>
                </product>
            </function>
            <function name="aero/coefficient/Cmde">
                <description>Pitch_moment_due_to_elevator</description>
                <product>
                    <property>aero/qbar-psf</property>
                    <property>metrics/Sw-sqft</property>
                    <property>metrics/cbarw-ft</property>
                    <property>fcs/elevator-pos-rad</property>
                      <table>
                          <independentVar>velocities/mach</independentVar>
                          <tableData>
                              0.0000	-1.0000
                              2.0000	-0.2500
                          </tableData>
                      </table>
                </product>
            </function>
            <function name="aero/coefficient/Cmq">
                <description>Pitch_moment_due_to_pitch_rate</description>
                <product>
                    <property>aero/qbar-psf</property>
                    <property>metrics/Sw-sqft</property>
                    <property>metrics/cbarw-ft</property>
                    <property>aero/ci2vel</property>
                    <property>velocities/q-aero-rad_sec</property>
                    <value>-20.0000</value>
                </product>
            </function>
            <function name="aero/coefficient/Cmadot">
                <description>Pitch_moment_due_to_alpha_rate</description>
                <product>
                    <property>aero/qbar-psf</property>
                    <property>metrics/Sw-sqft</property>
                    <property>metrics/cbarw-ft</property>
                    <property>aero/ci2vel</property>
                    <property>aero/alphadot-rad_sec</property>
                    <value>-8.0000</value>
                </product>
            </function>
        </axis>

        <axis name="YAW">
		    <function name="aero/coefficient/Cnb">
		       <description>Yaw_moment_due_to_beta</description>
		       <product>
		           <property>aero/qbar-psf</property>
		           <property>metrics/Sw-sqft</property>
		           <property>metrics/bw-ft</property>
		           <property>aero/beta-rad</property>
		           <value>0.12</value>
		       </product>
		    </function>

		    <function name="aero/coefficient/Cnr">
		       <description>Yaw_moment_due_to_yaw_rate</description>
		       <product>
		           <property>aero/qbar-psf</property>
		           <property>metrics/Sw-sqft</property>
		           <property>metrics/bw-ft</property>
		           <property>aero/bi2vel</property>
		           <property>velocities/r-aero-rad_sec</property>
		           <value>-0.15</value>
		       </product>
		    </function>

		    <function name="aero/coefficient/Cndr">
		       <description>Yaw_moment_due_to_rudder</description>
		       <product>
		           <property>aero/qbar-psf</property>
		           <property>metrics/Sw-sqft</property>
		           <property>metrics/bw-ft</property>
		           <property>fcs/rudder-pos-rad</property>
		           <value>-0.04</value>
		       </product>
		    </function>

		    <function name="aero/coefficient/Cnda">
		       <description>Adverse_yaw</description>
		       <product>
		           <property>aero/qbar-psf</property>
		           <property>metrics/Sw-sqft</property>
		           <property>metrics/bw-ft</property>
		           <property>fcs/left-aileron-pos-rad</property>
		           <value>0</value>
		       </product>
		    </function>
        </axis>
    </aerodynamics>

 		<system file="crash-detect"/>

</fdm_config>
